** Minimal validation model: single C3D8 element, linear static tension.
** Purpose: confirm headless solver execution and .sta/.msg/.dat output.
*HEADING
Validation cube - static tension
*NODE
1,  0.0, 0.0, 0.0
2,  1.0, 0.0, 0.0
3,  1.0, 1.0, 0.0
4,  0.0, 1.0, 0.0
5,  0.0, 0.0, 1.0
6,  1.0, 0.0, 1.0
7,  1.0, 1.0, 1.0
8,  0.0, 1.0, 1.0
*ELEMENT, TYPE=C3D8, ELSET=CUBE
1, 1, 2, 3, 4, 5, 6, 7, 8
*NSET, NSET=FIXED
1, 4, 5, 8
*NSET, NSET=PULL
2, 3, 6, 7
*SOLID SECTION, ELSET=CUBE, MATERIAL=STEEL
*MATERIAL, NAME=STEEL
*ELASTIC
210000.0, 0.3
*STEP, NLGEOM=NO
*STATIC
*BOUNDARY
FIXED, 1, 1
1, 2, 2
1, 3, 3
5, 3, 3
*CLOAD
PULL, 1, 100.0
*OUTPUT, FIELD
*NODE OUTPUT
U
*ELEMENT OUTPUT
S, E
*END STEP
